************************************************************************
*Heading
3D multi-element inhomogeneous tension
************************************************************************
**
** Note: Abaqus has no built-in units. It is the
** user's responsibility to use compatible units.
**
**       Units used in this problem, SI:
**                  Length               --- meters - m
**                  Time                 --- seconds - s
**                  Mass                 --- kilograms - kg
**                  Force                --- Newton - N
**                  Stress               --- Pascal - Pa = N/(m)^2
**                  Energy               --- Joule - J = N*m
**                  Density              --- kg/m^3
**
** Xiuqi Li, Dec 2020
**
************************************************************************
*Parameter
**  Total time (s)
total_time = 50.0
**
****************************************************************
** 			Model definition
****************************************************************
**
** Nodes
**
*Node, nset=nall
1,0.02540000,0.01850000,-0.02336800
2,0.02540000,0.01850000,-0.02235200
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**
** Elements
**
*Element, type=C3D8R, elset=elall
    1,   657,   543,    16,   164,  2663,  2549,  2022,  2170
    2,  1169,   657,   656,   307,  3175,  2663,  2662,  2313
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**
** Sets
**
*Nset, nset=Set-ref
    1,
*Nset, nset=Set-bot
    83,    84,    85,    86,    87,    88
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*Nset, nset=Set-top
     1,     2,     3,     4,     5,     6
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************************************************************************
**                     Material definition
************************************************************************
*Solid Section, elset=elall, material=mat
************************************************************************
******************
****************** User-defined material
******************
************************************************************************
*Material,name=mat
*User material,constants=39
500.0e3,1000.0e3,0.16,1.2,-0.1,0.12,7.0,0.64,
0.35,3.0,4.0,20.0,0.21,2.0,4,1,
580.0e3,0.18,3500.0,0.0,1.0,2,90.0e3,50.0,
0.0,0.0,1.0,2,80.0e3,2.0,0.0,2.5,
2.1,2,50.0e3,0.1,0.0,0.0,1.0
**
*Depvar
63
*Density
190.0
************************************************************************
**                        Amplitude
************************************************************************
*Amplitude, name=Profile
*Include, input=ten_0_1Hz_input.txt
************************************************************************
**                      Step definition
************************************************************************
*Step, name=Load, nlgeom=yes
*Dynamic, Explicit
,<total_time>
*Fixed Mass Scaling, factor=1e5
**
** Boundary conditions
**
*Boundary
Set-bot, 1, 3
Set-top, 2, 3
*BOUNDARY,amplitude=Profile
Set-top, 1, 1, 1.0
****************
****************  Outputs
****************
****************  Field output
****************
*Output, field, number interval=100
*Node Output
u,rf
*Element Output
s,le,sdv
****************
****************  History output
****************
*Output, history, frequency=100
*Node Output, nset=Set-top
rf1
*Node Output, nset=Set-ref
u1
*Energy Output
allie, allke
*End Step
************************************************************************
